OpenVSP model (file version 5), 1 components.
Geometry view with OpenVSP parameter names; values to 6 digits, angles in degrees, lengths in the model's unit.
Overall bounding box: X_Min=0 X_Len=1.0042 Y_Min=-0.1 Y_Len=0.2 Z_Min=-0.0025 Z_Len=0.0525

Fuselage "Body"
  location (X Y Z) 0 0 0, rotation 0 0 0
  bounding box size 1.0042 0.2 0.0525
  Design: Length=1
  cross sections:
    n  XLocPercent  YLocPercent  ZLocPercent  shape
    0  0            0            0            point
    1  0.005        0            0            circle Circle_Diameter=0.005
    2  0.99         0            0            edit curve Width=0.1 Height=0.05 AbsoluteFlag=0 SymType=1 cubic Bezier points (X Y): 1 0, 1 0, 0.5 0.5, 0 0.5, -0.5 0.5, -1 0, -1 0, -1 0.5, -0.5 1, 0 1, 0.5 1, 1 0.5, 1 0
    3  1            0            0.025        point
