OpenVSP model (file version 5), 2 components.
Geometry view with OpenVSP parameter names; values to 6 digits, angles in degrees, lengths in the model's unit.
Overall bounding box: X_Min=-0.9895 X_Len=1 Y_Min=-0.1 Y_Len=0.2 Z_Min=-0.06 Z_Len=0.12

BodyOfRevolution "Body"
  location (X Y Z) 0 0 0, rotation 0 0 0
  bounding box size 1 0.12 0.12
  Design: A0=0 Ae=0 Amin=0 AminW=0 Angle=0 Diameter=0.002 Mode=1
  profile: edit curve Width=0.001 Height=0.001 AbsoluteFlag=0 SymType=0 cubic Bezier points (X Y): 10 0, 10 -50, -1 -60, -2 -60, -3 -60, -990 -50, -990 0, -990 50, -3 60, -2 60, -1 60, 10 50, 10 0

Wing "WingGeom"
  location (X Y Z) -0.615 0.04 0, rotation 0 0 0
  symmetric about XZ
  bounding box size 0.6 0.2 0.001
  totals: TotalSpan=0.12 TotalProjectedSpan=0.12 TotalChord=0.375 TotalArea=0.045 TotalAR=0.32 MAC=0.42
  root: chord 0.6, twist 0, edit curve Width=0.6 Height=0.001 AbsoluteFlag=0 SymType=1 linear points (X Y): 0.5 0, 0.5 -0.5, 0 -0.5, -0.5 -0.5, -0.5 0, -0.5 0.5, 0 0.5, 0.5 0.5, 0.5 0
  sections:
    n  Span  Root_Chord  Tip_Chord  Area    Sweep  Sweep_Location  Dihedral  Twist  Twist_Location  tip airfoil
    1  0.06  0.6         0.15       0.0225  0      1               0         0      0.25            edit curve Width=0.15 Height=0.001 AbsoluteFlag=0 SymType=0 linear points (X Y): 0.5 0, 0.5 -0.5, 0 -0.5, -0.5 -0.5, -0.5 0, -0.5 0.5, 0 0.5, 0.5 0.5, 0.5 0
