OpenVSP model (file version 5), 3 components.
Geometry view with OpenVSP parameter names; values to 6 digits, angles in degrees, lengths in the model's unit.
Overall bounding box: X_Min=0 X_Len=1 Y_Min=-0.1 Y_Len=0.2 Z_Min=-0.1 Z_Len=0.2

Fuselage "Body"
  location (X Y Z) 0 0 0, rotation 0 0 0
  bounding box size 1 0.12 0.12
  Design: Length=1
  cross sections:
    n  XLocPercent  YLocPercent  ZLocPercent  shape
    0  0            0            0            point
    1  0.025        0            0            circle Circle_Diameter=0.025
    2  0.98         0            0            circle Circle_Diameter=0.12
    3  1            0            0            point

Wing "Strakes"
  location (X Y Z) 0.2 0 0, rotation 0 0 0
  2 copies around X
  bounding box size 0.75 0.2 0.005
  totals: TotalSpan=0.2 TotalProjectedSpan=0.2 TotalChord=0.475 TotalArea=0.095 TotalAR=0.421053 MAC=0.52807
  root: chord 0.75, twist 0, edit curve Width=0.75 Height=0.005 AbsoluteFlag=0 SymType=1 linear points (X Y): 0.5 0, 0.5 -0.5, 0 -0.5, -0.5 -0.5, -0.5 0, -0.5 0.5, 0 0.5, 0.5 0.5, 0.5 0
  sections:
    n  Span  Root_Chord  Tip_Chord  Area    Sweep  Sweep_Location  Dihedral  Twist  Twist_Location  tip airfoil
    1  0.1   0.75        0.2        0.0475  0      1               0         0      0.25            edit curve Width=0.2 Height=0.005 AbsoluteFlag=0 SymType=1 linear points (X Y): 0.5 0, 0.5 -0.5, 0 -0.5, -0.5 -0.5, -0.5 0, -0.5 0.5, 0 0.5, 0.5 0.5, 0.5 0

Wing "Fins"
  location (X Y Z) 0.7 0 0, rotation 90 0 0
  2 copies around X
  bounding box size 0.2 0.005 0.2
  totals: TotalSpan=0.2 TotalProjectedSpan=0.2 TotalChord=0.15 TotalArea=0.03 TotalAR=1.33333 MAC=0.155556
  root: chord 0.2, twist 0, edit curve Width=0.2 Height=0.005 AbsoluteFlag=0 SymType=1 linear points (X Y): 0.5 0, 0.5 -0.5, 0 -0.5, -0.5 -0.5, -0.5 0, -0.5 0.5, 0 0.5, 0.5 0.5, 0.5 0
  sections:
    n  Span  Root_Chord  Tip_Chord  Area   Sweep  Sweep_Location  Dihedral  Twist  Twist_Location  tip airfoil
    1  0.1   0.2         0.1        0.015  0      1               0         0      0.25            edit curve Width=0.1 Height=0.005 AbsoluteFlag=0 SymType=1 linear points (X Y): 0.5 0, 0.5 -0.5, 0 -0.5, -0.5 -0.5, -0.5 0, -0.5 0.5, 0 0.5, 0.5 0.5, 0.5 0
